** Abaqus input file created by pyFormex 3.2 (http://pyformex.org)
** pyFormex 3.2 (release-3.1-44-gbab5f524a) DEVELOPMENT VERSION
**
*HEADING
FEModel: feplast     Date: 2022-11-09 17:51:17.836526      Created by pyFormex
Script: examples.FePlast

**
**  NODES
**
*NODE, NSET=Nall
1,   0.000000e+00,   0.000000e+00,   0.000000e+00
2,   0.000000e+00,   1.000000e+01,   0.000000e+00
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*NSET,NSET=YZ_plane
1,2,3,4,5,6,7,8,9,10,11,
*NSET,NSET=XZ_plane
1,12,23,34,45,56
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**
**  ELEMENTS
**
*ELEMENT, TYPE=CPS4, ELSET=Eset_0_grp_0_Plate
1, 1, 12, 14, 3
2, 12, 23, 25, 14
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*ELSET,ELSET=Eall
Eset_0_grp_0_Plate
*ELSET,ELSET=Plate
Eset_0_grp_0_Plate
*ELSET,ELSET=Eset_grp_0
Eset_0_grp_0_Plate
*ELSET,ELSET=Loaded-1
16,32,48,64,80,96,112,128,144,160,
*ELSET,ELSET=Loaded-1
16,32,48,64,80,96,112,128,144,160,
*ELSET,ELSET=Loaded-1
16,32,48,64,80,96,112,128,144,160,
*ELSET,ELSET=Loaded-1
16,32,48,64,80,96,112,128,144,160,
**
**  SECTIONS
**
*MATERIAL, NAME=steel
*ELASTIC
0.207, 0.3
*DENSITY
7.85e-09
*SOLID SECTION, ELSET=Plate, MATERIAL=steel
10.0
**
**  BOUNDARY CONDITIONS
**
*BOUNDARY
YZ_plane, 1
*BOUNDARY
XZ_plane, 2
**
**  STEP
**
*STEP
*STATIC
1.0, 1.0, 0.01, 1.0
*DLOAD
Loaded-1, P2, -10.0
*NODE PRINT, NSET=Nall
U
*EL PRINT, ELSET=Eall
S
*END STEP
**
**  STEP
**
*STEP
*STATIC
1.0, 1.0, 0.01, 1.0
*DLOAD
Loaded-1, P2, -100.0
*NODE PRINT, NSET=Nall
U
*EL PRINT, ELSET=Eall
S
*END STEP
**
**  STEP
**
*STEP
*STATIC
1.0, 1.0, 0.01, 1.0
*DLOAD
Loaded-1, P2, -320.0
*NODE PRINT, NSET=Nall
U
*EL PRINT, ELSET=Eall
S
*END STEP
**
**  STEP
**
*STEP
*STATIC
1.0, 1.0, 0.01, 1.0
*DLOAD
Loaded-1, P2, -400.0
*NODE PRINT, NSET=Nall
U
*EL PRINT, ELSET=Eall
S
*END STEP
